*Heading
** Job name: metaball Model name: Model-1
** Generated by: Abaqus/CAE 2022
*Preprint, echo=NO, model=NO, history=NO, contact=NO
**
** PARTS
**
*Part, name=metaball
*Node
      1,   5.30835629,   26.6869087,   26.5803051
      2,   15.2366533,   22.8032627,   25.6190586
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*Element, type=C3D4
   1, 1141, 1142,  771, 1143
   2, 1144,   95, 1145, 1146
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*Nset, nset=Set-1, generate
    1,  1360,     1
*Elset, elset=Set-1, generate
    1,  4019,     1
** Section: Section-1
*Solid Section, elset=Set-1, material=PU
,
*End Part
**
**
** ASSEMBLY
**
*Assembly, name=Assembly
**
*Instance, name=metaball-1, part=metaball
*End Instance
**
*Node
      1, -7.65404223e-16,           0.,   45.0299225
*Nset, nset=Set-RP-1
 1,
*Nset, nset=Set-bottom, instance=metaball-1
 113, 114, 157, 158, 327, 328
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*Elset, elset=Set-bottom, instance=metaball-1
  337,  369,  370,  406,  507,  638
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*Nset, nset=Set-bound, instance=metaball-1
   5,   6,  13,  14,  21,  22
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*Elset, elset=Set-bound, instance=metaball-1
  181,  566,  657,  660,  708,  952
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*Nset, nset=Set-surface, instance=metaball-1, generate
    1,  1140,     1
*Elset, elset=Set-surface, instance=metaball-1
   28,   31,   51,   61,   77,  106
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*Nset, nset=Set-zero, instance=metaball-1
  111,  112,  113,  114,  117,  118
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*Elset, elset=Set-zero, instance=metaball-1
   51,  168,  204,  337,  369,  370
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*Elset, elset=_Surf-bottom_S4, internal, instance=metaball-1
  337,  507,  704,  845,  871, 1358
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*Elset, elset=_Surf-bottom_S2, internal, instance=metaball-1
  369,  370,  808,  954, 1955, 2005, 2369, 3499, 3774, 3776, 3900, 3902, 3917, 3944, 4008, 4013
*Elset, elset=_Surf-bottom_S3, internal, instance=metaball-1
  406,  638,  767, 1629, 1925, 1926
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*Elset, elset=_Surf-bottom_S1, internal, instance=metaball-1
  733,  818, 2386, 2573, 3551, 3608
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*Surface, type=ELEMENT, name=Surf-bottom
_Surf-bottom_S4, S4
_Surf-bottom_S2, S2
_Surf-bottom_S3, S3
_Surf-bottom_S1, S1
*Elset, elset=_Surf-bound_S2, internal, instance=metaball-1
  181, 1827, 2099, 2566, 2833, 3248, 3304, 3376
*Elset, elset=_Surf-bound_S1, internal, instance=metaball-1
  566,  660,  979, 1087, 1141, 1168, 1210, 1480
*Elset, elset=_Surf-bound_S3, internal, instance=metaball-1
  657,  708,  952, 1729, 1777, 1910
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*Elset, elset=_Surf-bound_S4, internal, instance=metaball-1
 1085, 1494, 2035, 2297, 2495, 2555, 3107, 3170
*Surface, type=ELEMENT, name=Surf-bound
_Surf-bound_S2, S2
_Surf-bound_S1, S1
_Surf-bound_S4, S4
_Surf-bound_S3, S3
** Constraint: Constraint-1
*Coupling, constraint name=Constraint-1, ref node=Set-RP-1, surface=Surf-bound
*Kinematic
**
** INTEGRATED OUTPUT SECTIONS
**
*Integrated Output Section, name=I-Section-1, surface=Surf-bottom, project orientation=NO
*End Assembly
**
** MATERIALS
**
*Material, name=PU
*Elastic
 5.25, 0.475
**
** BOUNDARY CONDITIONS
**
** Name: BC-bottom Type: Symmetry/Antisymmetry/Encastre
*Boundary
Set-bottom, ENCASTRE
** ----------------------------------------------------------------
**
** STEP: Step-1
**
*Step, name=Step-1, nlgeom=YES
*Static
1., 1., 1e-05, 1.
**
** BOUNDARY CONDITIONS
**
** Name: BC-RP Type: Displacement/Rotation
*Boundary
Set-RP-1, 1, 1, u1
Set-RP-1, 2, 2, u2
Set-RP-1, 3, 3, u3
Set-RP-1, 4, 4, ur1
Set-RP-1, 5, 5, ur2
Set-RP-1, 6, 6, ur3
**
** OUTPUT REQUESTS
**
*Restart, write, frequency=0
**
** FIELD OUTPUT: F-Output-1
**
*Output, field
*Node Output
U,
*Element Output, directions=YES
S,
**
** HISTORY OUTPUT: H-Output-1
**
*Output, history
*Integrated Output, section=I-Section-1
SOF, SOM
*End Step
